A := [7.14, 1.12, 0.95, 1.12; 1.12, 3.28, 1.30, 0.16; 0.95, 1.30, 5.44, 2.10; 1.12, 0.16, 2.10, 5.22]
# Характеристичне | рівняння
λ^4 - 21.08*λ^3 + 153.3563*λ^2 - 454.909366*λ + 461.501693
k := [461.501693; -454.909366; 153.356300; -21.08; 1]
polyroots(k) = [2.24587; 3.85199; 5.82677; 9.15537]
λ := eigenvals(A) = [9.15537; 5.82677; 3.85199; 2.24587]
M1 := [0.101732, -1.571982, 7.050244, -9.481473; 0, 1, 0, 0; 0, 0, 1, 0; 0, 0, 0, 1]
M2 := [1, 0, 0, 0; -0.959884, 0.282335, -3.180711, 7.303632; 0, 0, 1, 0; 0, 0, 0, 1]
M3 := [1, 0, 0, 0; 0, 1, 0, 0; -0.533333, -0.076190, 0.476190, -2.485714; 0, 0, 0, 1]
S := M3*M2*M1 = [
    0.101732, -1.57198, 7.05024, -9.48147;
    -0.0976509, 1.79126, -9.94813, 16.4047;
    -0.046817, 0.701914, -2.52599, 1.32119;
    0, 0, 0, 1
]
y1 := [2.245866^3; 2.245866^2; 2.245866^1; 2.245866^0] = [11.328; 5.04391; 2.24587; 1]
y2 := [3.851995^3; 3.851995^2; 3.851995^1; 3.851995^0] = [57.1554; 14.8379; 3.852; 1]
y3 := [5.826772^3; 5.826772^2; 5.826772^1; 5.826772^0] = [197.826; 33.9513; 5.82677; 1]
y4 := [9.155367^3; 9.155367^2; 9.155367^1; 9.155367^0] = [767.41; 83.8207; 9.15537; 1]
x1 := S*y1 = [-0.424096; 1.99134; -1.34179; 1]
x2 := S*y2 = [0.165706; -0.91826; -0.669847; 1]
x3 := S*y3 = [-1.64683; -0.0632479; 1.17206; 1]
x4 := S*y4 = [1.37152; 0.532088; 1.10196; 1]
A*x1 - 2.245866*x1 = [1.33439e-5; -5.19306e-6; -1.08247e-5; 4.86046e-8]
A*x2 - 3.851995*x2 = [3.52748e-5; 3.01635e-5; -3.77242e-5; -4.05426e-6]
A*x3 - 5.826772*x3 = [-3.97219e-5; 0.00031188; -3.2098e-5; -6.4428e-6]
A*x4 - 9.155367*x4 = [-0.00130717; 0.00244478; 0.000452129; -7.06322e-6]
