y(x) := sin(1.5*x) + nthroot(3*x, 3)
F(x) := -1.102554 - 0.668595*(x + 3) + 0.777085*(x + 3)*(x + 1) - 0.259028*(x + 3)*(x + 1)*(x - 1) + 0.058044*(x + 3)*(x + 1)*(x - 1)*(x - 3)
3
u := -4, -3.95 .. 6
# [plot: y(u), F(u) vs u]
x := [-3; -1; 1; 3; 5]
y := y(x) = [-1.10255; -2.43974; 2.43974; 1.10255; 3.40421]
f1(t) := sin(1.5*t) + nthroot(3*t, 3)
s := cspline(x, y)
A(t) := interp(s, x, y, t)
# [plot: A(u), f1(u) vs u]
f1(x) := -1.10255 - 1.70471*(x + 3) + 0.25903*(x + 3)^3
f2(x) := -2.43974 + 1.40363*(x + 1) + 1.55417*(x + 1)^2 - 0.51806*(x + 1)^3
f3(x) := 2.43974 + 1.40363*(x - 1) - 1.55417*(x - 1)^2 + 0.25903*(x - 1)^3
f4(x) := 1.10255 + 1.15083*(x - 3)
y(x) := sin(1.5*x) + nthroot(3*x, 3)
x := -3, -2.95 .. -1
a := -1, -0.95 .. 1
b := 1, 1.05 .. 3
c := 3, 3.05 .. 5
d := -3, -2.95 .. 5
# [plot: f1(x), f2(a), f3(b), f4(c), y(d) vs x, a, b, c, d]
